// SBML level 3 version 1

function CompetitiveInhibitionWithKcat(km, ki, kcat, E, I, S)
  kcat*E*S/(km + S + km*I/ki);
end

function CompetitiveInhibition(Vmax, km, ki, I, S)
  Vmax*S/(km + S + km*I/ki);
end

function MMWithKcat(km, kcat, S, E)
  kcat*E*S/(km + S);
end

model ComplexModel()

  // Compartments:
  compartment default_compartment = 1;
  compartment Cell = 1;

  // Species:
  species IRS1 in Cell = 10;
  species IRS1a in Cell = 0;
  species pIRS1 in Cell = 0;
  species PI3K in Cell = 10;
  species pPI3K in Cell = 0;
  species PI3Ki in Cell = 0;
  species PIP2 in Cell = 10;
  species PIP3 in Cell = 0;
  species PDK1 in Cell = 10;
  species PDK1_PIP3 in Cell = 0;
  species Akt in Cell = 10;
  species Akt_PIP3 in Cell = 0;
  species pAkt in Cell = 0;
  species Akti in Cell = 0;
  species TSC2 in Cell = 0;
  species pTSC2 in Cell = 0;
  species RagGDP in Cell = 10;
  species TSC2_Rag in Cell = 10;
  species RagGTP in Cell = 0;
  species mTORC1cyt in Cell = 10;
  species mTORC1lys in Cell = 0;
  species RhebGTP in Cell = 0;
  species pmTORC1 in Cell = 0;
  species RhebGDP in Cell = 10;
  species mTORC1i in Cell = 0;
  species mTORC1ii in Cell = 0;
  species mTORC1iii in Cell = 0;
  species FourEBP1 in Cell = 10;
  species pFourEBP1 in Cell = 0;
  species S6K in Cell = 10;
  species pS6K in Cell = 0;
  species AMPK in Cell = 10;
  species AMP in Cell = 0;
  species AMPK_AMP in Cell = 0;
  species ADP in Cell = 0;
  species AMPK_ADP in Cell = 0;
  species ATP in Cell = 10;
  species AMPK_ATP in Cell = 0;
  species pAMPKi in Cell = 0;
  species pAMPK in Cell = 0;
  species CaMKK2 in Cell = 10;
  species CaMKK2a in Cell = 0;
  species Ca2 in Cell = 0;
  species PKC in Cell = 10;
  species PKCa in Cell = 0;
  species RTK in Cell = 10;
  species pRTK in Cell = 0;
  species Sos in Cell = 10;
  species pRTKa in Cell = 0;
  species pSos in Cell = 0;
  species RasGDP in Cell = 10;
  species RasGTP in Cell = 0;
  species Raf in Cell = 10;
  species pRaf in Cell = 0;
  species Mek in Cell = 10;
  species pMek in Cell = 0;
  species Erk in Cell = 10;
  species pErk in Cell = 0;
  species Meki in Cell = 0;
  species DUSPmRNA in Cell = 0;
  species DUSP in Cell = 0;
  species PLCeps in Cell = 10;
  species pPLCeps in Cell = 0;
  species IP3 in Cell = 0;
  species DAG in Cell = 0;
  species IpR in Cell = 10;
  species IpRa in Cell = 0;
  species E2 in Cell = 0;
  species E2_cyt in Cell = 0;
  species ERa_cyt in Cell = 10;
  species ERa_E2 in Cell = 0;
  species ERa_dimer in Cell = 0;
  species ERa_dimer_nuc in Cell = 0;
  species ERa_nuc in Cell = 0;
  species TFFmRNA in Cell = 0;
  species Greb1mRNA in Cell = 0;
  species TFF in Cell = 0;
  species Greb1 in Cell = 0;
  species ProlifSignals in Cell = 0;
  species Growth in Cell = 0;
  species Immuno in Cell = 0;
  species pJak in Cell = 0;
  species Jak in Cell = 10;
  species Stat1 in Cell = 10;
  species pStat1 in Cell = 0;
  species pStat1_dim_cyt in Cell = 0;
  species pStat1_dim_nuc in Cell = 0;
  species IDO1mRNA in Cell = 0;
  species IDO1 in Cell = 0;
  species Kyn in Cell = 0;
  species GCN2 in Cell = 10;
  species GCN2a in Cell = 0;
  species eIFa in Cell = 10;
  species peIFa in Cell = 0;
  species LKB1 in Cell = 10;
  species ERa_cyti in Cell = 0;
  species Trp in Cell = 0;
  species $Fulvestrant in default_compartment = 0;
  species $Rapamycin in default_compartment = 0;
  species LKB1_nuc in default_compartment;

  // Parameters:
  PTEN = 10;
  LKB1a = 0;
  Insulin = 0;
  MK2206 = 0;
  AZD = 0;
  EGF = 0;
  Wortmannin = 0;
  PMA = 0;
  IGF = 0;
  INFg = 0;
  Feeding = 0;
  kIRS1Act = 0.1;
  kIRS1Inact = 0.1;
  kIRS1Phos = 0.1;
  kIRS1Dephos = 0.1;
  kPI3KPhosByIRS1a = 0.1;
  kPI3KDephos = 0.1;
  kPI3KPhosByIGF = 0.1;
  kPI3KPhosByGreb1 = 0.1;
  kPI3KPhosByRas = 0.1;
  kPIPPhos = 1;
  kPIPDephos = 0.1;
  kPDK1BindPIP3 = 0.1;
  kPDK1UnbindPIP3 = 0.1;
  kAktBindPIP3 = 0.1;
  kAktUnbindPIP3 = 0.1;
  kAktPhos = 1;
  kAktDephos = 0.1;
  kTSC2Phos = 0.1;
  kTSC2Dephos = 0.1;
  kTSC2BindRagGDP = 0.1;
  kTSC2UnbindRagGDP = 0.1;
  kRagLoad = 0.1;
  kmTORC1CytToLys = 0.1;
  kmTORC1LysToCyt = 0.1;
  kmTORC1Phos = 0.1;
  kmTORC1Dephos = 0.1;
  kRhebLoad = 0.1;
  kRhebUnload = 0.1;
  k4EBP1Phos = 0.1;
  k4EBP1Dephos = 0.1;
  kS6KPhos = 0.1;
  kS6KDehos = 0.1;
  kAMPKBindAMP = 0.1;
  kAMPKUnbindAMP = 0.1;
  kAMPKBindADP = 0.1;
  kAMPKUnbindADP = 0.1;
  kAMPKBindATP = 0.1;
  kAMPKUnbindATP = 0.1;
  kAMPKInhibByAkt = 0.1;
  kAMPKDephos = 0.1;
  kAMPKActByLKB1 = 0.1;
  kAMPKInact = 0.1;
  kAMPKActByCaMKK2 = 0.1;
  kCaMKK2Act = 0.1;
  kCaMKK2Inact = 0.1;
  kPKCAct = 0.1;
  kPKCActByPMA = 0.1;
  kPKCInact = 0.1;
  kTKRBindEGF = 0.1;
  kTKRUnbindEGF = 0.1;
  kTKRBindSOS = 0.1;
  kTKRUnbindSOS = 0.1;
  kSOSPhos = 0.1;
  kSOSDephos = 0.1;
  kRasLoadByRTK = 0.1;
  kRasLoadByPKC = 0.1;
  kRasUnload = 0.1;
  kRafPhos = 0.1;
  kRafDephos = 0.1;
  kRafDephosByAkt = 0.1;
  kMekPhos = 0.1;
  kMekDephos = 0.1;
  kErkPhos = 0.1;
  kErkDephos = 0.1;
  kDUSPmRNAIn = 0.01;
  kDUSPmRNAOut = 0.1;
  kDUSPIn = 0.01;
  kDUSPOut = 0.1;
  kPLCPhos = 0.1;
  kPLCPhosBasal = 0.1;
  kPLCDephos = 0.1;
  kPIP2Break = 0.1;
  kPIP2form = 0.1;
  kIP3BindIpR = 0.1;
  kIP3UnbindIpR = 0.1;
  kCa2In = 0.1;
  kCa2Out = 0.1;
  kE2ToCyt = 1;
  kE2CytToEx = 0.1;
  kE2BindER = 1;
  kE2UnbindER = 0.1;
  kERDim = 0.1;
  kERUndim = 0.1;
  kERCytToNuc = 0.1;
  kERNucToCyt = 0.1;
  kERDimUnbind = 0.1;
  kERDimBind = 0.1;
  kTFFmRNAIn = 0.1;
  kTFFmRNAOut = 0.1;
  kGreb1mRNAIn = 0.1;
  kGreb1mRNAOut = 0.1;
  kTFFIn = 0.1;
  kTFFOut = 0.1;
  kGreb1In = 0.1;
  kGreb1Out = 0.1;
  kProlifSignalIn = 0.1;
  kProlifSignalOut = 0.1;
  kGrowthBasal = 0.01;
  kGrowthActive = 0.1;
  kGrowthInhibBasal = 0.1;
  kGrowthInhibActive = 0.1;
  kImmunoInBasal = 0.1;
  kImmunoInActive = 0.1;
  kImmunoOut = 0.1;
  kJakPhos = 0.1;
  kJakDephos = 0.1;
  kStat1Phos = 0.1;
  kStat1Dephos = 0.1;
  kStat1Dim = 0.1;
  kStat1Undim = 0.1;
  kStat1DimToNuc = 1;
  kStat1DimToCyt = 0.1;
  kIDO1mRNAIn = 0.01;
  kIDO1mRNAOut = 0.1;
  kIDO1In = 0.1;
  kIDO1Out = 0.01;
  kAAToKyn = 10;
  kKynToAA = 0.1;
  kAAIn = 1;
  kAAOut = 0.1;
  kGCN2Act = 0.1;
  kGCN2Inact = 0.1;
  keIFaPhos = 0.5;
  keIFaDephos = 0.1;
  kAASuffIn = 0.1;
  kAASuffOut = 0.1;
  kPI3KBindWort = 100;
  kPI3KUnbindWort = 0.1;
  kMekBindAZD = 100;
  kMekUnbindAZD = 0.1;
  kmTORC1BindRapa = 100;
  kAktUnbindMK = 0.1;
  kmTORC1UnbindRapa = 0.1;
  kERaBindFulv = 100;
  kERaUnbindFulv = 0.1;
  kTrpIn = 0.3;
  kTrpOut = 0.1;
  kAktBindMK = 100;
  kAMPKAMPActByLKB1 = ;
  kAMPKADPActByLKB1 = ;
  kATPIn = ;
  kATPUsage = ;
  kLKB1ToCyt = ;
  kLKB1ToNuc = ;
  kAK = ;
  AK = ;

  // Reactions:
  R1f: IRS1 => IRS1a; Cell*kIRS1Act*IRS1*Insulin;
  R1b: IRS1a => IRS1; Cell*kIRS1Inact*IRS1a;
  R1i: IRS1a => pIRS1; Cell*kIRS1Phos*IRS1a*pS6K;  // modifiers: pS6K
  R1Out2: pIRS1 => IRS1; Cell*kIRS1Dephos*pIRS1;
  R2fIRS: PI3K => pPI3K; Cell*kPI3KPhosByIRS1a*PI3K*IRS1a;  // modifiers: IRS1a
  R2b: pPI3K => PI3K; Cell*kPI3KDephos*pPI3K;
  R2if: PI3K => PI3Ki; Cell*kPI3KBindWort*PI3K*Wortmannin;
  R2ib: PI3Ki => PI3K; Cell*kPI3KUnbindWort*PI3Ki;
  R2fIGF: PI3K => pPI3K; Cell*kPI3KPhosByIGF*PI3K*IGF;
  R2fGreb1: PI3K => pPI3K; Cell*kPI3KPhosByGreb1*PI3K*Greb1;  // modifiers: Greb1
  R2fRas: PI3K => pPI3K; Cell*kPI3KPhosByRas*PI3K*RasGTP;  // modifiers: RasGTP
  R3f: PIP2 => PIP3; Cell*kPIPPhos*PIP2*pPI3K;  // modifiers: pPI3K
  R3b: PIP3 => PIP2; Cell*kPIPDephos*PIP3*PTEN;
  R4f: PIP3 + PDK1 => PDK1_PIP3; Cell*kPDK1BindPIP3*PIP3*PDK1;
  R4b: PDK1_PIP3 => PIP3 + PDK1; Cell*kPDK1UnbindPIP3*PDK1_PIP3;
  R5f: PIP3 + Akt => Akt_PIP3; Cell*kAktBindPIP3*PIP3*Akt;
  R5b: Akt_PIP3 => PIP3 + Akt; Cell*kAktUnbindPIP3*Akt_PIP3;
  R6f: Akt_PIP3 => pAkt; Cell*kAktPhos*Akt_PIP3;
  R6b: pAkt => Akt_PIP3; Cell*kAktDephos*pAkt;
  R6if: Akt => Akti; Cell*kAktBindMK*Akt*MK2206;
  R6ib: Akti => Akt; Cell*kAktUnbindMK*Akti;
  R7f: TSC2 => pTSC2; Cell*kTSC2Phos*TSC2*pAkt;  // modifiers: pAkt
  R7b: pTSC2 => TSC2; Cell*kTSC2Dephos*pTSC2;
  R8f: TSC2 + RagGDP => TSC2_Rag; Cell*kTSC2BindRagGDP*TSC2*RagGDP;
  R8b: TSC2_Rag => TSC2 + RagGDP; Cell*kTSC2UnbindRagGDP*TSC2_Rag*pAkt;  // modifiers: pAkt
  R9f: RagGDP => RagGTP; Cell*kRagLoad*RagGDP*Trp;  // modifiers: Trp
  R10f: mTORC1cyt + RagGTP => mTORC1lys + RagGDP; Cell*kmTORC1CytToLys*mTORC1cyt*RagGTP;
  R10b: mTORC1lys => mTORC1cyt; Cell*kmTORC1LysToCyt*mTORC1lys;
  R11f: mTORC1lys + RhebGTP => pmTORC1 + RhebGDP; Cell*kmTORC1Phos*mTORC1lys*RhebGTP;
  R11b: pmTORC1 => mTORC1lys; Cell*kmTORC1Dephos*pmTORC1*AMPK;  // modifiers: AMPK
  R12f: RhebGDP => RhebGTP; Cell*kRhebLoad*RhebGDP;
  R12b: RhebGTP => RhebGDP; Cell*kRhebUnload*RhebGTP*TSC2_Rag;  // modifiers: TSC2_Rag
  R13fi: mTORC1cyt + $Rapamycin => mTORC1i; Cell*kmTORC1BindRapa*mTORC1cyt*Rapamycin;
  R13bi: mTORC1i => mTORC1cyt + $Rapamycin; Cell*kmTORC1UnbindRapa*mTORC1i;
  R13fii: mTORC1lys + $Rapamycin => mTORC1ii; Cell*kmTORC1BindRapa*mTORC1lys*Rapamycin;
  R13bii: mTORC1ii => mTORC1lys + $Rapamycin; Cell*kmTORC1UnbindRapa*mTORC1ii;
  R13fiii: pmTORC1 + $Rapamycin => mTORC1iii; Cell*kmTORC1BindRapa*pmTORC1*Rapamycin;
  R13biii: mTORC1iii => pmTORC1 + $Rapamycin; Cell*kmTORC1UnbindRapa*mTORC1iii;
  R14f: FourEBP1 => pFourEBP1; Cell*k4EBP1Phos*FourEBP1*pmTORC1;  // modifiers: pmTORC1
  R14b: pFourEBP1 => FourEBP1; Cell*k4EBP1Dephos*pFourEBP1;
  R15f: S6K => pS6K; Cell*kS6KPhos*S6K*pmTORC1;  // modifiers: pmTORC1
  R15b: pS6K => S6K; Cell*kS6KDehos*pS6K;
  R16AMPK1f: AMPK + AMP => AMPK_AMP; Cell*kAMPKBindAMP*AMPK*AMP;
  R16AMPK1b: AMPK_AMP => AMPK + AMP; Cell*kAMPKUnbindAMP*AMPK_AMP;
  R16AMPK2f: AMPK + ADP => AMPK_ADP; Cell*kAMPKBindADP*AMPK*ADP;
  R16AMPK2b: AMPK_ADP => AMPK + ADP; Cell*kAMPKUnbindADP*AMPK_ADP;
  R16AMPK3f: AMPK + ATP => AMPK_ATP; Cell*kAMPKBindATP*AMPK*ATP;
  R16AMPK3b: AMPK_ATP => AMPK + ATP; Cell*kAMPKUnbindATP*AMPK_ATP;
  R16AMPKif: AMPK => pAMPKi; Cell*kAMPKInhibByAkt*AMPK*pAkt;  // modifiers: pAkt
  R16AMPKib: pAMPKi => AMPK; Cell*kAMPKDephos*pAMPKi;
  R17f1: AMPK_AMP => pAMPK; Cell*kAMPKAMPActByLKB1*AMPK_AMP*LKB1a;
  R17b1: pAMPK => AMPK_AMP; Cell*kAMPKInact*pAMPK;
  R17f2: AMPK_ADP => pAMPK; Cell*kAMPKADPActByLKB1*AMPK_ADP*LKB1a;
  R17b2: pAMPK => AMPK_ADP; Cell*kAMPKInact*pAMPK;
  R17f3: AMPK => pAMPK; Cell*kAMPKActByCaMKK2*AMPK*CaMKK2a;  // modifiers: CaMKK2a
  R17b3: pAMPK => AMPK; Cell*kAMPKInact*pAMPK;
  R18f: CaMKK2 => CaMKK2a; Cell*kCaMKK2Act*CaMKK2*Ca2;  // modifiers: Ca2
  R18b: CaMKK2a => CaMKK2; Cell*kCaMKK2Inact*CaMKK2a;
  R19In: ADP => ATP; Cell*kATPIn*ADP*Feeding;
  R19Out: ATP => ADP; Cell*kATPUsage*ATP;
  R20f: LKB1_nuc => LKB1; Cell*kLKB1ToCyt*LKB1_nuc*Feeding;
  R20b: LKB1 => LKB1_nuc; Cell*kLKB1ToNuc*LKB1;
  R21f: ADP + ADP => ATP + AMP; Cell*kAK*AK*ADP^2;
  R22f: RTK => pRTK; Cell*kTKRBindEGF*RTK*EGF;
  R22b: pRTK => RTK; Cell*kTKRUnbindEGF*pRTK;
  R23f: pRTK + Sos => pRTKa; Cell*kTKRBindSOS*pRTK*Sos;
  R23b: pRTKa => pRTK + Sos; Cell*kTKRUnbindSOS*pRTKa;
  R24f: Sos => pSos; Cell*kSOSPhos*Sos*pErk;  // modifiers: pErk
  R24b: pSos => Sos; Cell*kSOSDephos*pSos;
  R25fi: RasGDP => RasGTP; Cell*kRasLoadByRTK*RasGDP*pRTKa;  // modifiers: pRTKa
  R25fii: RasGDP => RasGTP; Cell*kRasLoadByPKC*RasGDP*PKCa;  // modifiers: PKCa
  R25b: RasGTP => RasGDP; Cell*kRasUnload*RasGTP;
  R26f: Raf + RasGTP => pRaf + RasGDP; Cell*kRafPhos*Raf*RasGTP;
  R26b: pRaf => Raf; Cell*kRafDephosByAkt*pRaf*pAkt;  // modifiers: pAkt
  R27f: Mek => pMek; Cell*kMekPhos*Mek*pRaf;  // modifiers: pRaf
  R27b: pMek => Mek; Cell*kMekDephos*pMek;
  R27if: Mek -> Meki; Cell*kMekBindAZD*Mek*AZD;
  R27ib: Meki -> Mek; Cell*kMekUnbindAZD*Meki;
  R28f: Erk => pErk; Cell*kErkPhos*Erk*pMek;  // modifiers: pMek
  R28b: pErk => Erk; Cell*kErkDephos*pErk*DUSP;  // modifiers: DUSP
  R30In: => DUSPmRNA; Cell*kDUSPmRNAIn*pErk;  // modifiers: pErk
  R30OUT: DUSPmRNA => ; Cell*kDUSPmRNAOut*DUSPmRNA;
  R31In: => DUSP; Cell*kDUSPIn*DUSPmRNA;  // modifiers: DUSPmRNA
  R31OUT: DUSP => ; Cell*kDUSPOut*DUSP;
  R32f: PLCeps => pPLCeps; Cell*kPLCPhosBasal*PLCeps*RasGTP;  // modifiers: RasGTP
  R32b: pPLCeps => PLCeps; Cell*kPLCDephos*pPLCeps;
  R33f: PIP2 => IP3 + DAG; Cell*kPIP2Break*PIP2*pPLCeps;  // modifiers: pPLCeps
  R33b: IP3 + DAG => PIP2; Cell*kPIP2form*IP3*DAG;
  R34f: IP3 + IpR => IpRa; Cell*kIP3BindIpR*IP3*IpR;
  R34b: IpRa => IP3 + IpR; Cell*kIP3UnbindIpR*IpRa;
  R35f: => Ca2; Cell*kCa2In*IpRa;  // modifiers: IpRa
  R35b: Ca2 => ; Cell*kCa2Out*Ca2;
  R36f1: PKC => PKCa; Cell*kPKCAct*PKC*DAG;  // modifiers: DAG
  R36f2: PKC => PKCa; Cell*kPKCActByPMA*PKC*PMA;
  R36b: PKCa => PKC; Cell*kPKCInact*PKCa;
  R37f: E2 => E2_cyt; Cell*kE2ToCyt*E2;
  R37b: E2_cyt => E2; Cell*kE2CytToEx*E2_cyt;
  R38f: ERa_cyt + E2_cyt => ERa_E2; Cell*kE2BindER*ERa_cyt*E2_cyt;
  R38b: ERa_E2 => ERa_cyt + E2_cyt; Cell*kE2UnbindER*ERa_E2;
  R39if: ERa_cyt + $Fulvestrant => ERa_cyti; Cell*kERaBindFulv*ERa_cyt*Fulvestrant;
  R39ib: ERa_cyti => ERa_cyt + $Fulvestrant; Cell*kERaUnbindFulv*ERa_cyti;
  R40f: ERa_E2 + ERa_E2 => ERa_dimer; Cell*kERDim*ERa_E2*ERa_E2;
  R40b: ERa_dimer => ERa_E2 + ERa_E2; Cell*kERUndim*ERa_dimer;
  R41f: ERa_dimer => ERa_dimer_nuc; Cell*kERCytToNuc*ERa_dimer;
  R41b: ERa_dimer_nuc => ERa_dimer; Cell*kERNucToCyt*ERa_dimer_nuc;
  R42f: ERa_dimer_nuc => ERa_nuc + ERa_nuc; Cell*kERDimUnbind*ERa_dimer_nuc;
  R42b: ERa_nuc + ERa_nuc => ERa_dimer_nuc; Cell*kERDimBind*ERa_nuc*ERa_nuc;
  R43In: => TFFmRNA; Cell*kTFFmRNAIn*ERa_dimer_nuc;  // modifiers: ERa_dimer_nuc
  R43Out: TFFmRNA => ; Cell*kTFFmRNAOut*TFFmRNA;
  R44In: => Greb1mRNA; Cell*kGreb1mRNAIn*ERa_dimer_nuc;  // modifiers: ERa_dimer_nuc
  R44Out: Greb1mRNA => ; Cell*kGreb1mRNAOut*Greb1mRNA;
  R45In: => TFF; Cell*kTFFIn*TFFmRNA*eIFa;  // modifiers: TFFmRNA, eIFa
  R45Out: TFF => ; Cell*kTFFOut*TFF;
  R46In: => Greb1; Cell*kGreb1In*Greb1mRNA*eIFa;  // modifiers: Greb1mRNA, eIFa
  R46Out: ProlifSignals => ; Cell*kProlifSignalOut*ProlifSignals;
  R46In1: => ProlifSignals; Cell*kProlifSignalIn*ERa_dimer_nuc;  // modifiers: ERa_dimer_nuc
  R46In2: => ProlifSignals; Cell*kProlifSignalIn*pS6K;  // modifiers: pS6K
  R47In1: => Growth; Cell*kGrowthBasal;
  R47In2: => Growth; Cell*kGrowthActive*ProlifSignals;  // modifiers: ProlifSignals
  R47Out1: Growth => ; Cell*kGrowthInhibBasal*Growth;
  R47Out2: Growth => ; Cell*kGrowthInhibActive*Growth*Immuno;  // modifiers: Immuno
  R48In1: => Immuno; Cell*kImmunoInBasal;
  R48In2: => Immuno; Cell*kImmunoInActive*Kyn;  // modifiers: Kyn
  R48Out: Immuno => ; Cell*kImmunoOut*Immuno;
  R49f: Jak => pJak; Cell*kJakPhos*Jak*INFg;
  R49b: pJak => Jak; Cell*kJakDephos*pJak;
  R50f: Stat1 => pStat1; Cell*kStat1Phos*Stat1*pJak;  // modifiers: pJak
  R50b: pStat1 => Stat1; Cell*kStat1Dephos*pStat1;
  R51f: pStat1 + pStat1 => pStat1_dim_cyt; Cell*kStat1Dim*pStat1^2;
  R51b: pStat1_dim_cyt => pStat1 + pStat1; Cell*kStat1Undim*pStat1_dim_cyt;
  R52f: pStat1_dim_cyt => pStat1_dim_nuc; Cell*kStat1DimToNuc*pStat1_dim_cyt;
  R52b: pStat1_dim_nuc => pStat1_dim_cyt; Cell*kStat1DimToCyt*pStat1_dim_nuc;
  R53In: => IDO1mRNA; Cell*kIDO1mRNAIn*pStat1_dim_nuc;  // modifiers: pStat1_dim_nuc
  R53Out: IDO1mRNA => ; Cell*kIDO1mRNAOut*IDO1mRNA;
  R54In: => IDO1; Cell*kIDO1In*IDO1mRNA*eIFa;  // modifiers: eIFa, IDO1mRNA
  R54Out: IDO1 => ; Cell*kIDO1Out*IDO1;
  R55f: Trp => Kyn; Cell*kAAToKyn*Trp*IDO1;  // modifiers: IDO1
  R55b: Kyn => Trp; Cell*kKynToAA*Kyn;
  R56f: GCN2a => GCN2; Cell*kGCN2Act*GCN2a*Trp;  // modifiers: Trp
  R56b: GCN2 => GCN2a; Cell*kGCN2Inact*GCN2;
  R57f: eIFa => peIFa; Cell*keIFaPhos*eIFa*GCN2a;  // modifiers: GCN2a
  R57b: peIFa => eIFa; Cell*keIFaDephos*peIFa;
  R58f: => Trp; Cell*kTrpIn*Feeding;
  R58b: Trp => ; Cell*kTrpOut*Trp;
end
